<?xml version="1.0"?>
<?xml-stylesheet href="JSBSim.xsl" type="application/xml"?>
<fdm_config name="C-17 Globemaster III" version="2.0" release="BETA">
  <!--
      :copyright: 2024-2023, IAHM-COL
      :copyright: 2024-2023, David Waggoner
      License: GPLv3

      File:     C-17.xml
      Inputs:
      name:          C-17A Globemaster III
      type:          four-engine transonic transport
      max weight:    585000 lb
      wing span:     169 ft
      length:        174 ft
      wing area:     3800 sq-ft
      gear type:     tricycle
      retractable?:  yes
      # engines:     4
      engine type:   turbine
      engine layout: wings
      yaw damper?    yes
      Outputs:
      wing loading:  153.95 lb/sq-ft
      CL-alpha:      5.0446 per radian
      CL-0:          0.2
      CL-max:        1.2
      CD-0:          0.017
      K:             0.042

      Redistribution, or reuse, with or without modifications
      shall keep this attribution information.
  -->

  <fileheader>
    <author>IH-COL, D. Waggoner, Jon Bourgeois, Adam Fothergill</author>
    <email>iahmcol@thejabberwocky.net</email>
    <filecreationdate>2022-08-22</filecreationdate>
    <description>C-17 Globemaster III: USAF Strategic Airlifter</description>
    <version>2.0</version>
  </fileheader>

  <!--FDM-->
  <metrics name="METRICS: C-17" file="Aero/C-17-metrics.xml" />
  <mass_balance name="MASS_BALANCE: C-17" file="Aero/C-17-massBalance.xml" />
  <ground_reactions name="CONTACTS: C-17" file="Aero/C-17-groundReactions.xml" />
  <propulsion name="POWER: C-17" file="Aero/C-17-propulsion.xml" />
  <flight_control name="FCS: C-17" file="Aero/C-17-flightControl.xml" />
  <aerodynamics name="AERO: C-17" file="Aero/C-17-aerodynamics.xml" />

  <!--Systems-->
  <system name="PAYLOAD: C-17" file="Systems/cargobay-loading.xml" />
  <system name="FADEC: C-17" file="Systems/fadec.xml" />
  <system name="LIVERY: C-17" file="Systems/livery-updating.xml" />

  <!--Instruments-->
  <!-- Dash -->
  <system name="PANEL LIGHTS: C-17" file="Models/Panels/Instruments/PanelLighting/PanelLighting-systems.xml" />
  <system name="FLAP INDICATOR: C-17" file="Models/Panels/Instruments/FlapIndicator/FlapIndicator-systems.xml" />
  <system name="SPEEDBRAKE INDICATOR: C-17" file="Models/Panels/Instruments/SpeedbrakeIndicator/SpeedbrakeIndicator-systems.xml" />
  <system name="ATTITUDE INDICATOR: C-17" file="Models/Panels/Instruments/AttitudeIndicator/AttitudeIndicator-systems.xml" />
  <system name="ALTASI: C-17" file="Models/Panels/Instruments/altasi/altasi-systems.xml" />
  <system name="GEARS LEVER: C-17" file="Models/Panels/Instruments/gearsLever/gearsLever-systems.xml" />
  <system name="BRAKES INDICATOR: C-17" file="Models/Panels/Instruments/brakesIndicator/brakesIndicator-systems.xml" />
  <system name="FUEL LEVELS: C-17" file="Models/Panels/Instruments/fuelLevel/fuelLevel-systems.xml" />
  <system name="DIGITAL CLOCK: C-17" file="Models/Panels/Instruments/digitalClock/digitalClock-systems.xml" />
  <system name="STBY RMIDME: C-17" file="Models/Panels/Instruments/RMIDME/RMIDME-systems.xml" />
  <system name="CNC RADIO: C-17" file="Models/Panels/Instruments/cnc-radio/cnc-radio-systems.xml" />
  <system name="TRIM INDICATORS: C-17" file="Models/Panels/Instruments/trim-indicators/trim-indicators-systems.xml" />
  <system name="STANDBY ENGINE: C-17"  file="Models/Panels/Instruments/engine-stby/engine-stby-systems.xml"/>
  <!-- Pedestal -->
  <system name="CONTROLS QUAD: C-17" file="Models/Panels/Instruments/Pedestal/controlsQuad/controlsQuad-systems.xml" />

  <!--Output-->
  <output name="C-17-jsbim-output.csv" type="CSV" rate="120">
    <simulation>OFF</simulation>
    <atmosphere>OFF</atmosphere>
    <massprops>OFF</massprops>
    <aerosurfaces>OFF</aerosurfaces>
    <rates>OFF</rates>
    <velocities>OFF</velocities>
    <forces>OFF</forces>
    <moments>OFF</moments>
    <position>OFF</position>
    <coefficients>OFF</coefficients>
    <ground_reactions>OFF</ground_reactions>
    <fcs>OFF</fcs>
    <propulsion>OFF</propulsion>
  </output>
</fdm_config>
